OpenVSP model (file version 4), 6 components.
Geometry view with OpenVSP parameter names; values to 6 digits, angles in degrees, lengths in the model's unit.
Overall bounding box: X_Min=-1.84783 X_Len=8.14404 Y_Min=-6.85436 Y_Len=13.7087 Z_Min=-0.122826 Z_Len=2.20978

Wing "WingGeom"
  location (X Y Z) 0 0.35 0, rotation 0 0 0
  symmetric about XZ
  bounding box size 1.50216 13.7087 0.213702
  totals: TotalSpan=13.0087 TotalProjectedSpan=13.0087 TotalChord=1.5 TotalArea=19.5131
  root: chord 1.5, twist 0, airfoil file "Glenn Martin 2"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 ThickChord=0.1
  sections:
    n  Span     Root_Chord  Tip_Chord  Area     Sweep  Sweep_Location  Dihedral  Twist  Twist_Location  tip airfoil
    1  6.50436  1.5         1.5        9.75653  0      0               0         0      0.25            as above

Fuselage "FuselageGeom"
  location (X Y Z) -1.84783 0 0.0271739, rotation 0 0 0
  bounding box size 4.572 0.7 0.327005
  Design: Length=4.572
  cross sections:
    n  XLocPercent  YLocPercent  ZLocPercent  shape
    0  0            0            0.0217391    point
    1  0.25         0            0            general fuselage BotStr=0.83 BotTanAngle=90 CornerRad=0 Height=0.3 LowStr=0.83 MaxWidthLoc=0 TopStr=0.83 TopTanAngle=90 UpStr=0.83 Width=0.7
    2  0.5          0            0            as above
    3  0.75         0            0            as above
    4  1            0            0.0217391    point

Fuselage "boom"
  location (X Y Z) 2.3913 0 0.217391, rotation 0 0 0
  bounding box size 3.45 0.1 0.1
  Design: Length=3.45
  cross sections:
    n  XLocPercent  YLocPercent  ZLocPercent  shape
    0  0            0            0            circle Circle_Diameter=0.1
    1  1            0            0            as above

Wing "vertgeom"
  location (X Y Z) 5.56723 0 0.147059, rotation 90 0 0
  symmetric about XZ
  bounding box size 0.7 0.0975153 1
  totals: TotalSpan=2 TotalProjectedSpan=2 TotalChord=0.7 TotalArea=1.4
  root: chord 0.7, twist 0, NACA 4-series Camber=0 CamberLoc=0.2 ThickChord=0.12
  sections:
    n  Span  Root_Chord  Tip_Chord  Area  Sweep  Sweep_Location  Dihedral  Twist  Twist_Location  tip airfoil
    1  1     0.7         0.7        0.7   0      0               0         0      0.25            NACA 4-series Camber=0 CamberLoc=0.2 ThickChord=0.1

Wing "horizgeom"
  location (X Y Z) 5.54622 0 1.13445, rotation 0 0 0
  symmetric about XZ
  bounding box size 0.75 1.5 0.0870672
  totals: TotalSpan=1.5 TotalProjectedSpan=1.5 TotalChord=0.75 TotalArea=1.125
  root: chord 0.75, twist 0, NACA 4-series Camber=0 CamberLoc=0.2 ThickChord=0.1
  sections:
    n  Span  Root_Chord  Tip_Chord  Area    Sweep  Sweep_Location  Dihedral  Twist  Twist_Location  tip airfoil
    1  0.75  0.75        0.75       0.5625  0      0               0         0      0.25            as above

Stack "prop_disk"
  location (X Y Z) 2.06522 0 1.08696, rotation 0 0 0
  bounding box size 0 2 2
  cross sections:
    n  XDelta  YDelta  ZDelta  shape
    0  0       0       0       point
    1  0       0       0       circle Circle_Diameter=1.5
    2  0       0       0       point
